*Heading
** Job name: Job-1 Model name: Model-1
** Generated by: Abaqus/CAE 2020
*Preprint, echo=NO, model=NO, history=NO, contact=NO
**
** PARTS
**
*Part, name=Part-1
*Node
      1,          0.5,          0.5,           1.
      2,          0.5,         -0.5,           1.
      3,          0.5,          0.5,           0.
      4,          0.5,         -0.5,           0.
      5,         -0.5,          0.5,           1.
      6,         -0.5,         -0.5,           1.
      7,         -0.5,          0.5,           0.
      8,         -0.5,         -0.5,           0.
*Element, type=C3D8R
1, 5, 6, 8, 7, 1, 2, 4, 3
*Nset, nset=_PickedSet2, internal, generate
 1,  8,  1
*Elset, elset=_PickedSet2, internal
 1,
** Section: Section-1
*Solid Section, elset=_PickedSet2, controls=EC-1, material=Material-1
,
*End Part
**
**
** ASSEMBLY
**
*Assembly, name=Assembly
**
*Instance, name=Part-1-1, part=Part-1
*End Instance
**
*Nset, nset=_PickedSet4, internal, instance=Part-1-1, generate
 2,  8,  2
*Elset, elset=_PickedSet4, internal, instance=Part-1-1
 1,
*Nset, nset=_PickedSet5, internal, instance=Part-1-1, generate
 1,  7,  2
*Elset, elset=_PickedSet5, internal, instance=Part-1-1
 1,
*End Assembly
**
** ELEMENT CONTROLS
**
*Section Controls, name=EC-1, hourglass=ENHANCED
1., 1., 1.
*Amplitude, name=Amp-1
             0.,          0.0005,           0.001,           0.001,           0.002,           0.002,           0.003,           0.003
          0.004,           0.004,           0.005,           0.005,           0.006,           0.006,           0.007,           0.007
          0.008,           0.008,           0.009,           0.009,            0.01,            0.01,           0.011,           0.011
          0.012,           0.012,           0.013,           0.013,           0.014,           0.014,           0.015,           0.015
          0.016,           0.016,           0.017,           0.017,           0.018,           0.018,           0.019,           0.019
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             1.,              1.
** MATERIALS
**
*Material, name=Material-1
*Density
7800.,
*Depvar
      4,
*Anisotropic Hyperelastic, user, formulation=INVARIANT, type=COMPRESSIBLE, local direction=1, properties=5
 9.09e+10,   7.8e+10,  3.58e+11, -2.65e+11, -1.82e+11
** ----------------------------------------------------------------
**
** STEP: Step-1
**
*Step, name=Step-1, nlgeom=YES
*Dynamic, Explicit, direct user control
1,0.1
**
** BOUNDARY CONDITIONS
**
** Name: BC-1 Type: Displacement/Rotation
*Boundary
_PickedSet4, 1, 1
_PickedSet4, 2, 2
_PickedSet4, 3, 3
** Name: BC-2 Type: Displacement/Rotation
*Boundary, amplitude=Amp-1
_PickedSet5, 1, 1, 0.3
_PickedSet5, 2, 2
_PickedSet5, 3, 3
**
** OUTPUT REQUESTS
**
*Restart, write, number interval=1, time marks=NO
**
** FIELD OUTPUT: F-Output-1
**
*Output, field, variable=PRESELECT, number interval=1000
**
** HISTORY OUTPUT: H-Output-1
**
*Output, history, variable=PRESELECT
*End Step
